# Функция Egg Holder
# Целевая функция:
f(x, y) := -x*sin(sqrt(|x - (y + 47)|)) - (y + 47)*sin(sqrt(|x/2 + 47 + y|))
# Проверка значений в точках:
f(512, 404.2319) = -959.641
f(512.0001, 404.2319) = -959.641
f(367.682, 464.74) = -287.645
# График:
# [component: inputs f]
# [component: inputs f]
