# Rana
# Целевая функция:
f(x, y) := x*sin(sqrt(|y + 1 - x|))*cos(sqrt(|y + 1 + x|)) + (y + 1)*cos(sqrt(|y + 1 - x|))*sin(sqrt(|y + 1 + x|))
# Проверка значений в точках:
f(-488.6326, 512) = -511.733
f(-488.6326, 512.0001) = -511.733
f(-169.488, -458.027) = 145.162
# График:
# [component: inputs f]
# [component: inputs f]
